// COMSOL Multiphysics 6.2.0.339 model "ConductingWedge.mph"
// Outline of the model tree

Parameters
  wedge_base = 1[m]
  wedge_height = 1[m]
  gap = 0.1[m]
  groundedPlateH = 0.1[m]
  wedgeV = 100[V]
  y_offset = 0.05[m]

Geometry
  geom1 "ConductingWedge" (2D, length unit m)
    pol1: Polygon "Wedge"
      source = table
      table = {{0.0, -wedge_height+y_offset}, {wedge_base/2, y_offset}, {-wedge_base/2, y_offset}}
    r1: Rectangle "GroundedPlate"
      pos = {-wedge_base, -wedge_height-gap-groundedPlateH}
      size = {2*wedge_base, groundedPlateH}
    r2: Rectangle "SimVolume"
      pos = {-wedge_base, -wedge_height-gap-groundedPlateH}
      size = {2*wedge_base, +wedge_height+gap+groundedPlateH + 0.1}
    r3: Rectangle "Dielectric" | pos = {-wedge_base/2, -wedge_height-gap}; size = {wedge_base, gap}
    dif1: Difference | input = r2; input2 = r1
    dif2: Difference | input = dif1; input2 = r3; keepsubtract = on
    dif3: Difference | input = dif2; input2 = pol1
    fin: Finalize "Form Union"

Materials
  mat1: Common "GXe" on domains 1
    def "Basic"
      relpermittivity = 1
  mat2: Common "LXe" on domains 2
    def "Basic"
      relpermittivity = 1.95

Physics
  es: Electrostatics on all domains
    dependent variable V
    ccn1: ChargeConservation (default)
    zc1: ZeroCharge (default)
    init1: init "Initial Values 1" (default)
    sfcd1: SurfaceChargeDensity on boundaries 1, 3, 12
    pot1: ElectricPotential on boundaries 7-9 | V0 = wedgeV
    pot2: ElectricPotential on boundaries 2, 5, 11

Mesh
  mesh1 "Mesh 1" (physics-controlled)
    size: MeshSizeDefault | hauto = 1

Studies
  std1 "Study 1"
    stat: Stationary

Solver configurations
  sol1 "Solution 1" (study std1)
    v1: Variables "Dependent Variables 1"
    s1: Stationary "Stationary Solver 1"
      dDef: Direct
      fc1: FullyCoupled | linsolver = dDef

Datasets
  dset1: Solution | solution = sol1

Plots
  pg1: PlotGroup2D "Electric Potential (es)" | data = dset1
    surf1: Surface | expr = V
    str1: Streamline on boundaries 1-7, 9-12 | expr = {es.Ex, es.Ey}; udist = 0.02
      col1: Color "Color Expression 1" | expr = V
      filt1: Filter | expr = !isScalingSystemDomain
  pg2: PlotGroup2D "Electric Field Norm (es)" | data = dset1
    surf1: Surface | expr = es.normE
    str1: Streamline on boundaries 1-7, 9-12 | expr = {es.Ex, es.Ey}; udist = 0.02
      col1: Color "Color Expression 1" | expr = es.normE
      filt1: Filter | expr = !isScalingSystemDomain
  pg3: SmithGroup "Smith Plot Group 3" | data = dset1

Exports
  data1: Data
    data = dset1
    expr = V
    unit = V
    descr = Electric potential
    exporttype = vtu
    filename = /home/felix/MFEMElectrostatics/sim_results/ConductingWedge/COMSOL.vtu