// COMSOL Multiphysics 6.2.0.339 model "TwoWires.mph"
// Outline of the model tree

Parameters
  wire_center_x = 0.2[m]
  wire_center_y = 0.0[m]
  r1 = 0.1[m]
  r2 = 0.15[m]
  W = 2*wire_center_x +r1 + r2 + 2*max(r1, r2)
  x0 = - W/2
  H = max(r1, r2)*2 * 3/2
  y0 = -H/2
  Wire1Potential = 0[V]
  Wire2Potential = 100[V]

Geometry
  geom1 "TwoWires" (2D, length unit m)
    c1: Circle "Wire1" | pos = {wire_center_x, wire_center_y}; r = r2
    c2: Circle "Wire2" | pos = {-wire_center_x, wire_center_y}; r = r1
    r1: Rectangle "SimVol" | pos = {x0, y0}; size = {W, H}
    r2: Rectangle "Dielectric" | pos = {-wire_center_x, -min(r1, r2)}; size = {2*wire_center_x, 2*min(r1, r2)}
    dif1: Difference | input = r1; input2 = c1, c2; keepsubtract = on
    dif2: Difference | input = r2; input2 = c1, c2
    dif3: Difference | input = dif1; input2 = dif2; keepsubtract = on
    fin: Finalize "Form Union"

Materials
  mat1: Common "GXe" on domains 1
    def "Basic"
      relpermittivity = 1
  mat2: Common "Lxe" on domains 2
    def "Basic"
      relpermittivity = 1.95

Physics
  es: Electrostatics on all domains
    dependent variable V
    ccn1: ChargeConservation (default)
    zc1: ZeroCharge (default)
    init1: init "Initial Values 1" (default)
    df1: DisplacementField "Electric Displacement Field 1" on boundaries 1-3, 6
    pot1: ElectricPotential "Wire2" on boundaries 7-10 | V0 = Wire2Potential
    pot2: ElectricPotential "Wire1" on boundaries 11-16 | V0 = Wire1Potential

Mesh
  mesh1 "Mesh 1" (physics-controlled)
    size: MeshSizeDefault | hauto = 2

Studies
  std1 "Study 1"
    stat: Stationary

Solver configurations
  sol1 "Solution 1" (study std1)
    v1: Variables "Dependent Variables 1"
    s1: Stationary "Stationary Solver 1"
      dDef: Direct
      fc1: FullyCoupled

Datasets
  dset1: Solution | solution = sol1

Plots
  pg1: PlotGroup2D "Electric Potential (es)" | data = dset1
    surf1: Surface | expr = V
    str1: Streamline on boundaries 1-16 | expr = {es.Ex, es.Ey}; udist = 0.02
      col1: Color "Color Expression 1" | expr = V
      filt1: Filter | expr = !isScalingSystemDomain
  pg2: PlotGroup2D "Electric Field Norm (es)" | data = dset1
    surf1: Surface | expr = es.normE
    str1: Streamline on boundaries 1-16 | expr = {es.Ex, es.Ey}; udist = 0.02
      col1: Color "Color Expression 1" | expr = es.normE
      filt1: Filter | expr = !isScalingSystemDomain

Exports
  data1: Data | data = dset1; expr = V; unit = V; descr = Electric potential; exporttype = vtu