// COMSOL Multiphysics 6.2.0.339 model "ParallelPlateCapacitor.mph"
// Outline of the model tree

Parameters
  dielectric_height = 0.1[m]
  plate_x = 0.5[m]
  plate_width = 0.5[m]
  plate_height = 0.05[m]
  TopPlateV = 100[V]
  BottomPlateV = 0[V]

Geometry
  geom1 "ParallelPlateCapacitor" (2D, length unit m)
    r1: Rectangle "TopPlate" | pos = {plate_x, dielectric_height / 2}; size = {plate_width, plate_height}
    r2: Rectangle "BottomPlate"
      pos = {plate_x, -dielectric_height / 2 - plate_height}
      size = {plate_width, plate_height}
    r3: Rectangle "LXe"
      pos = {0, -(dielectric_height + plate_height * 2 + dielectric_height) * 1.5 /2}
      size = {plate_x * 2 + plate_width, (dielectric_height + plate_height * 2 + dielectric_height) * 1.5}
    r4: Rectangle "GXe" | pos = {plate_x, -dielectric_height/2}; size = {plate_width, dielectric_height}
    dif1: Difference | input = r3; input2 = r1, r2
    dif2: Difference | input = dif1; input2 = r4; keepsubtract = on
    fin: Finalize "Form Union"

Materials
  mat1: Common "GXe" on domains 1
    def "Basic"
      relpermittivity = 1
  mat2: Common "LXe" on domains 2
    def "Basic"
      relpermittivity = 1.95

Physics
  es: Electrostatics on all domains
    dependent variable V
    ccn1: ChargeConservation (default)
    zc1: ZeroCharge (default)
    init1: init "Initial Values 1" (default)
    sfcd1: SurfaceChargeDensity on boundaries 1-3, 14
    pot1: ElectricPotential on boundaries 8-10, 13 | V0 = TopPlateV
    pot2: ElectricPotential on boundaries 4, 5, 7, 11

Mesh
  mesh1 "Mesh 1" (physics-controlled)
    size: MeshSizeDefault | hauto = 2

Studies
  std1 "Study 1"
    stat: Stationary

Solver configurations
  sol1 "Solution 1" (study std1)
    v1: Variables "Dependent Variables 1"
    s1: Stationary "Stationary Solver 1"
      dDef: Direct
      fc1: FullyCoupled

Datasets
  dset1: Solution | solution = sol1

Plots
  pg1: PlotGroup2D "Electric Potential (es)" | data = dset1
    surf1: Surface | expr = V
    str1: Streamline on boundaries 1-14 | expr = {es.Ex, es.Ey}; udist = 0.02
      col1: Color "Color Expression 1" | expr = V
      filt1: Filter | expr = !isScalingSystemDomain
  pg2: PlotGroup2D "Electric Field Norm (es)" | data = dset1
    surf1: Surface | expr = es.normE
    str1: Streamline on boundaries 1-14 | expr = {es.Ex, es.Ey}; udist = 0.02
      col1: Color "Color Expression 1" | expr = es.normE
      filt1: Filter | expr = !isScalingSystemDomain